c := 299792458
ε := 2.1
μ := 1
μ0 := 4*π*10^-7
foH11 := (2.4*10^9)
ε0 := 8.85*10^-12
δ := 59.6*10^6
λo := (c/foH11)/sqrt(ε) = 0.0861985
P := 2*λo/π*0.8 = 0.0439005
D := P*3.6/4.6 = 0.0343569
d := D/3.6 = 0.0095436
Сp := 2*π*ε*ε0/ln(D/d) = 9.11624e-11
ZB := sqrt(ε*ε0*μ*μ0)/Сp = 53.0115
Rs := sqrt(π*foH11*(μ*μ0)/δ) = 0.0126085
α := Rs*(1 + D/d)/(sqrt((μ*μ0)/(ε*ε0))*D*ln(D/d)) = 0.00506822
